# Demostracion para obtener la Matriz de Rigidez 3D
# Considerando el Efecto de Cortante
# Verifiacion con SAP2000
# Diagrama de cuerpo libre, denominaciones de cargas y esfuerzos:
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## Deformacion y Energia Complementaria
## Metodo de Clayperon
# Deformacion en la direccion de la carga
Δ == d/dP(U) == integral((d/dP(N))*N/(E*A), x = 0 .. L) + integral((d/dP(V))*V/(G*Av), x = 0 .. L) + integral((d/dP(M))*M/(E*I), x = 0 .. L)
## Esfuerzo Normal
# Sumatoria de fuerza en "x":
-N + Fx == 0
N == Fx
# Desplazamiento lineal en la direccion "x"
δx == integral((d/dFx(N))*N/(E*A), x = 0 .. L)
δx == integral((d/dFx(Fx))*Fx/(E*A), x = 0 .. L)
δx == Fx*L/(A*E)
Fx == (A*E/L)*δx
## Esfuerzo Cortante y Flector
# Sumatoria de fuerza en "z":
V + Fz == 0
V == Fz
# Sumatoria de momentos alrededor de "y":
M == Fz*L - Qy + integral(V, x = 0 .. x)
M == (Fz*L - Qy + Fz*x == Fz*(L - x) - Qy)
# Desplazamiento lineal en la direccion "z"
δz == integral((d/dFz(V))*V/(G*Az), x = 0 .. L) + integral((d/dFz(M))*M/(E*Iy), x = 0 .. L)
# Desplazamiento angular alrededor de la direccion "y"
θy == integral((d/dQy(V))*V/(G*Az), x = 0 .. L) + integral((d/dQy(M))*M/(E*Iy), x = 0 .. L)
# Reemplazando los esfuerzos normales, cortantes y flectores
δz == integral((d/dFz(Fz))*Fz/(G*Az), x = 0 .. L) + integral((d/dFz(Fz*(L - x) - Qy))*(Fz*(L - x) - Qy)/(E*Iy), x = 0 .. L)
θy == integral((d/dQy(Fz))*Fz/(G*Az), x = 0 .. L) + integral((d/dQy(Fz*(L - x) - Qy))*(Fz*(L - x) - Qy)/(E*Iy), x = 0 .. L)
# Integrando resulta:
δz == Fz*L/(Az*G) - L^2*(3*Qy - 2*Fz*L)/(6*E*Iy)
θy == L*(2*Qy - Fz*L)/(2*E*Iy)
# Ordenando de forma matricial
[δz; θy] == [L^3/(3*E*Iy) + L/(Az*G), -L^2/(2*E*Iy); -L^2/(2*E*Iy), L/(E*Iy)]*[Fz; Qy]
# Reordenando con la inversa de la matriz anterior
[Fz; Qy] == [
    12*Az*E*G*Iy/(Az*G*L^3 + 12*E*Iy*L), 6*Az*E*G*Iy/(Az*G*L^2 + 12*E*Iy);
    6*Az*E*G*Iy/(Az*G*L^2 + 12*E*Iy), 2*E*Iy*(2*Az*G*L^2 + 6*E*Iy)/(L*(Az*G*L^2 + 12*E*Iy))
]*[δz; θy]
[Fz; Qy] == [
    12*E*Iy/(L^3 + 12*E*Iy*L/(Az*G)), 6*E*Iy/(L^2 + 12*E*Iy/(Az*G));
    6*E*Iy/(L^2 + 12*E*Iy/(Az*G)), 4*E*Iy*(L^2 + 3*E*Iy/(Az*G))/(L*(L^2 + 12*E*Iy/(Az*G)))
]*[δz; θy]
# Asignando algunas variables para simplificar
ϕz == 3/L^2*E*Iy/(Az*G)  # Cuando se desprecia el efecto de cortante (ϕz == 0)
φz == 2*E*Iy/(L*(1 + 4*ϕz))
[Fz; Qy] == [6*φz/L^2, 3*φz/L; 3*φz/L, 2*(1 + ϕz)*φz]*[δz; θy]
# Por analogia podemos obtener para las cortante y flexion en la otra direccion, teniendo presente que para el momento flector se debe cambiar el signo (regla de la mano derecha)
ϕy == 3/L^2*E*Iz/(Ay*G)  # Cuando se desprecia el efecto de cortante (ϕy == 0)
φz == 2*E*Iz/(L*(1 + 4*ϕy))
[Fy; Qz] == [6*φy/L^2, 3*φy/L; -3*φy/L, -2*(1 + ϕy)*φy]*[δy; θz]
## Esfuerzo Torsor
# Sumatoria de momento torsores en "x":
T + Qx == 0
T == Qx
# Desplazamiento angular alrededor de la direccion "x"
θx == integral((d/dFx(T))*T/(G*A), x = 0 .. L)
θx == integral((d/dQx(Qx))*Qx/(G*J), x = 0 .. L)
θx == L*Qx/(J*G)
Qx == (J*G/L)*θx
## Matriz de rigidez
ϕz == 3/L^2*E*Iy/(Az*G)
φz == 2*E*Iy/(L*(1 + 4*ϕz))
ϕy == 3/L^2*E*Iz/(Ay*G)
φz == 2*E*Iz/(L*(1 + 4*ϕy))
[Fx; Fy; Fz; Qx; Qy; Qz] == [
    A*E/L, 0, 0, 0, 0, 0;
    0, 6*φy/L^2, 0, 0, 0, 3*φy/L;
    0, 0, 6*φz/L^2, 0, 3*φz/L, 0;
    0, 0, 0, J*G/L, 0, 0;
    0, 0, 3*φz/L, 0, 2*(1 + ϕz)*φz, 0;
    0, -3*φy/L, 0, 0, 0, -2*(1 + ϕy)*φy
]*[δx; δy; δz; θx; θy; θz]
## Ejemplo de calculo
## Geometria
L := 157.5
## Material
E := 3604.9965
μ := 0.2
G := E/(2*(1 + μ)) = 1502.08
## Seccion
b := 14
h := 18
β := 6/5 = 1.2
A := b*h = 252
Az := A/β = 210
Ay := Az = 210
Iy := b*h^3/12 = 6804
Iz := h*b^3/12 = 4116
rbh := min(b/h, h/b) = 0.777778
J := max(b, rbh^3*h^4*(1/3 - 0.21*rbh*(1 - rbh^4/12))) = 8642.66
## Fuerza en el nudo
[Fx; Fy; Fz; Qx; Qy; Qz] := [-4.4; 5.2; -6.6; 20; 86.8; 90]
## Matriz de rigidez
ϕz := 3/L^2*E*Iy/(Az*G) = 0.00940408
φz := 2*E*Iy/(L*(1 + 4*ϕz)) = 300180
ϕy := 3/L^2*E*Iz/(Ay*G) = 0.00568889
φy := 2*E*Iz/(L*(1 + 4*ϕy)) = 184229
k := [
    A*E/L, 0, 0, 0, 0, 0;
    0, 6*φy/L^2, 0, 0, 0, 3*φy/L;
    0, 0, 6*φz/L^2, 0, 3*φz/L, 0;
    0, 0, 0, J*G/L, 0, 0;
    0, 0, 3*φz/L, 0, 2*(1 + ϕz)*φz, 0;
    0, -3*φy/L, 0, 0, 0, -2*(1 + ϕy)*φy
]
k = [
    5767.99, 0, 0, 0, 0, 0;
    0, 44.5603, 0, 0, 0, 3509.12;
    0, 0, 72.6059, 0, 5717.71, 0;
    0, 0, 0, 82425.3, 0, 0;
    0, 0, 5717.71, 0, 606006, 0;
    0, -3509.12, 0, 0, 0, -370554
]
## Desplazamientos
[δx; δy; δz; θx; θy; θz] := k^-1*[Fx; Fy; Fz; Qx; Qy; Qz] = [-0.00076283; 0.534225; -0.397612; 0.000242644; 0.00389474; -0.00530195]
# SAP2000
[-763*10^-6; 534*10^-3; -398*10^-3; 243*10^-6; 3.895*10^-3; 5.302*10^-3]
